*HEADING
cubit(ents/github/ofem/examples/nedelec/resonator/resonator.inp): 01/26/2018: 09
version: 16.3.4
**
********************************** P A R T S **********************************
*PART, NAME=Part-Default
**
********************************** N O D E S **********************************
*NODE, NSET=ALLNODES
       1,    2.500000e-01,   -2.500000e-01,    5.000000e-01
       2,    2.500000e-01,    2.500000e-01,    5.000000e-01
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**
********************************** E L E M E N T S ****************************
*ELEMENT, TYPE=C3D4, ELSET=dielectric
       1,     279,     280,     281,     282
       2,     283,     284,     285,     282
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**
********************************** S I D E S E T S **********************************
*ELSET, ELSET=PEC_S1
      42,      52,      77,      88,     121,     226
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*ELSET, ELSET=PEC_S2
     427,     688,     701,     999,    1389,    1552
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*ELSET, ELSET=PEC_S3
    1581,    1582,    1842,    2025,    2290,    2298,    2372
*ELSET, ELSET=PEC_S4
     226,     706,    1359,    1708,    1766,    1788,    1870,    1872,    2059,    2173,
    2225,    2277,    2473
*SURFACE, NAME=PEC
PEC_S1, S1
PEC_S2, S2
PEC_S3, S3
PEC_S4, S4
*ELSET, ELSET=Excitation_S1
     181,     243,     259,     347,     395,     559
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*ELSET, ELSET=Excitation_S2
     269,    1420,    1650,    1890,    1927,    1951,    2098,    2105,    2111,    2116,
    2279,    2355,    2427
*ELSET, ELSET=Excitation_S3
    1586,    2053,    2063
*ELSET, ELSET=Excitation_S4
     433,    2365,    2411,    2417,    2453,    2461
*SURFACE, NAME=Excitation
Excitation_S1, S1
Excitation_S2, S2
Excitation_S3, S3
Excitation_S4, S4
**
********************************** P R O P E R T I E S ************************
*SOLID SECTION, ELSET=dielectric, MATERIAL=Default-Steel
**
*END PART
**
**
**
********************************** E N D   P A R T S **********************************
**
**
********************************** A S S E M B L Y ************************************
**
*ASSEMBLY, NAME=ASSEMBLY1
**
*INSTANCE, NAME=Part-Default_1, PART=Part-Default
*END INSTANCE
**
*END ASSEMBLY
**
**
**
*MATERIAL, NAME = Default-Steel
*ELASTIC, TYPE=ISOTROPIC
2.068000e+05, 2.900000e-01
*DENSITY
7.000000e-06
*CONDUCTIVITY,TYPE=ISO
4.500000e-02
*SPECIFIC HEAT
5.000000e+02
**
**
************************************** H I S T O R Y *************************************
**
*PREPRINT
**
**************************************** S T E P 1 ***************************************
*STEP,INC=100,NAME=Default Set
**
*STATIC
1, 1, 1e-05, 1
**
**
**
**
*END STEP
