*HEADING
cubit(ehre/2015/HT/MANF/uebung/uebung4/meshes/chargedSphere.inp): 10/22/2015: 07
version: 15.1.4
**
********************************** P A R T S **********************************
*PART, NAME=Part-Default
**
********************************** N O D E S **********************************
*NODE, NSET=ALLNODES
       1,    2.502744e+00,   -1.363454e-01,    6.181027e+00
       2,    6.294812e-01,   -4.841745e-01,    6.618396e+00
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**
********************************** E L E M E N T S ****************************
*ELEMENT, TYPE=C3D4, ELSET=Sphere_1
       1,       1,       2,       3,       4
       2,       1,       4,       5,       6
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*ELEMENT, TYPE=C3D4, ELSET=Aussenraum
    2644,     576,     577,     578,     579
    2645,     578,     580,     576,     581
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**
********************************** S I D E S E T S **********************************
*ELSET, ELSET=Erde_S1
    7292,    7769,    7975,    8218
*ELSET, ELSET=Erde_S2
    2797,    3453,    3735,    3837,    4270,    4377
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*ELSET, ELSET=Erde_S3
    2723,    2750,    2826,    2856,    2924,    2943
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*ELSET, ELSET=Erde_S4
    3221,    4156,    4395,    5318,    5442,    5678
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*SURFACE, NAME=Erde
Erde_S1, S1
Erde_S2, S2
Erde_S3, S3
Erde_S4, S4
*ELSET, ELSET=Inner_Surf_S1
    1341
*ELSET, ELSET=Inner_Surf_S2
     660,     997,    1256,    1955,    2061,    2327,    2544,    2574
*ELSET, ELSET=Inner_Surf_S3
       9,      31,      34,      35,      51,      56
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*ELSET, ELSET=Inner_Surf_S4
     419,     514,     750,     763,    1247,    1398,    1477,    1493,    1547,    1778,
    1801,    2051,    2059
*SURFACE, NAME=Inner_Surf
Inner_Surf_S1, S1
Inner_Surf_S2, S2
Inner_Surf_S3, S3
Inner_Surf_S4, S4
**
********************************** P R O P E R T I E S ************************
*SOLID SECTION, ELSET=Sphere_1, MATERIAL=Default-Steel
*SOLID SECTION, ELSET=Aussenraum, MATERIAL=Default-Steel
**
*END PART
**
**
**
********************************** E N D   P A R T S **********************************
**
**
********************************** A S S E M B L Y ************************************
**
*ASSEMBLY, NAME=ASSEMBLY1
**
*INSTANCE, NAME=Part-Default_1, PART=Part-Default
*END INSTANCE
**
*END ASSEMBLY
**
**
**
**
************************************** H I S T O R Y *************************************
**
*PREPRINT
**
**************************************** S T E P 1 ***************************************
*STEP,INC=100,NAME=Default Set
**
*STATIC
1, 1, 1e-05, 1
**
**
**
**
*END STEP
