*HEADING
cubit(FEM/examples/eddyCurrent/CoilsAndPlate/coil_plate_new.inp): 04/13/2018: 13
version: 16.3.4
**
********************************** P A R T S **********************************
*PART, NAME=Part-Default
**
********************************** N O D E S **********************************
*NODE, NSET=ALLNODES
       1,    1.500000e-01,    5.000000e-01
       2,    1.000000e-01,    5.000000e-01
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**
********************************** E L E M E N T S ****************************
*ELEMENT, TYPE=STRI3, ELSET=coil1
       1,     722,       7,     707
       2,     707,     191,     723
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*ELEMENT, TYPE=STRI3, ELSET=coil2
      97,     766,      15,     751
      98,     751,     204,     767
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*ELEMENT, TYPE=STRI3, ELSET=coil3
     193,     810,      23,     795
     194,     795,     217,     811
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*ELEMENT, TYPE=STRI3, ELSET=coil4
     289,     854,      31,     839
     290,     839,     230,     855
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*ELEMENT, TYPE=STRI3, ELSET=plate
     385,     944,      46,     903
     386,     903,     250,     945
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*ELEMENT, TYPE=STRI3, ELSET=space
     609,    2295,     336,    2297
     610,    2297,     617,    2299
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**
********************************** S I D E S E T S **********************************
*ELSET, ELSET=coil1_E1
       1,      14,      17,      25,      30,      33
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*ELSET, ELSET=coil1_E2
       3,      12,      18,      27,      29,      33
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*SURFACE, NAME=coil1
coil1_E1, E1
coil1_E2, E2
*ELSET, ELSET=coil2_E1
      97,     110,     113,     121,     126,     129
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*ELSET, ELSET=coil2_E2
      99,     108,     114,     123,     125,     129
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*SURFACE, NAME=coil2
coil2_E1, E1
coil2_E2, E2
*ELSET, ELSET=coil3_E1
     193,     206,     209,     217,     222,     225
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*ELSET, ELSET=coil3_E2
     195,     204,     210,     219,     221,     225
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*SURFACE, NAME=coil3
coil3_E1, E1
coil3_E2, E2
*ELSET, ELSET=coil4_E1
     289,     302,     305,     313,     318,     321
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*ELSET, ELSET=coil4_E2
     291,     300,     306,     315,     317,     321
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*SURFACE, NAME=coil4
coil4_E1, E1
coil4_E2, E2
*ELSET, ELSET=plate_E1
     385,     398,     406,     409,     422,     425
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*ELSET, ELSET=plate_E2
     387,     397,     404,     410,     420,     426
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*SURFACE, NAME=plate
plate_E1, E1
plate_E2, E2
*ELSET, ELSET=Dirichlet_E1
     522,     525,    1754,    1757,    1770,    1773
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*ELSET, ELSET=Dirichlet_E2
     521,     527,    1753,    1759,    1769,    1829
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*SURFACE, NAME=Dirichlet
Dirichlet_E1, E1
Dirichlet_E2, E2
**
********************************** P R O P E R T I E S ************************
*SHELL SECTION, ELSET=coil1, SECTION INTEGRATION=SIMPSON, MATERIAL=Default-Steel
1.000000e+00
*SHELL SECTION, ELSET=coil2, SECTION INTEGRATION=SIMPSON, MATERIAL=Default-Steel
1.000000e+00
*SHELL SECTION, ELSET=coil3, SECTION INTEGRATION=SIMPSON, MATERIAL=Default-Steel
1.000000e+00
*SHELL SECTION, ELSET=coil4, SECTION INTEGRATION=SIMPSON, MATERIAL=Default-Steel
1.000000e+00
*SHELL SECTION, ELSET=plate, SECTION INTEGRATION=SIMPSON, MATERIAL=Default-Steel
1.000000e+00
*SHELL SECTION, ELSET=space, SECTION INTEGRATION=SIMPSON, MATERIAL=Default-Steel
1.000000e+00
**
*END PART
**
**
**
********************************** E N D   P A R T S **********************************
**
**
********************************** A S S E M B L Y ************************************
**
*ASSEMBLY, NAME=ASSEMBLY1
**
*INSTANCE, NAME=Part-Default_1, PART=Part-Default
*END INSTANCE
**
*END ASSEMBLY
**
**
**
*MATERIAL, NAME = Default-Steel
*ELASTIC, TYPE=ISOTROPIC
2.068000e+05, 2.900000e-01
*DENSITY
7.000000e-06
*CONDUCTIVITY,TYPE=ISO
4.500000e-02
*SPECIFIC HEAT
5.000000e+02
**
**
************************************** H I S T O R Y *************************************
**
*PREPRINT
**
**************************************** S T E P 1 ***************************************
*STEP,INC=100,NAME=Default Set
**
*STATIC
1, 1, 1e-05, 1
**
**
**
**
*END STEP
