*HEADING
cubit(FEM/oFEM/examples/eddyCurrent/asynchronousMotor/motor.inp): 04/13/2018: 13
version: 16.3.4
**
********************************** P A R T S **********************************
*PART, NAME=Part-Default
**
********************************** N O D E S **********************************
*NODE, NSET=ALLNODES
       1,    7.396115e+00,    5.128107e+00
       2,    8.054036e+00,    4.650000e+00
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**
********************************** E L E M E N T S ****************************
*ELEMENT, TYPE=STRI3, ELSET=inner_coil1
       1,    1049,       4,    1024
       2,    1024,     278,    1050
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*ELEMENT, TYPE=STRI3, ELSET=inner_coil2
     113,    1098,      12,    1073
     114,    1073,     292,    1099
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*ELEMENT, TYPE=STRI3, ELSET=inner_coil3
     225,    1147,      20,    1122
     226,    1122,     306,    1148
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*ELEMENT, TYPE=STRI3, ELSET=inner_coil4
     337,    1196,      28,    1171
     338,    1171,     320,    1197
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*ELEMENT, TYPE=STRI3, ELSET=inner_coil5
     449,    1245,      36,    1220
     450,    1220,     334,    1246
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*ELEMENT, TYPE=STRI3, ELSET=inner_coil6
     561,    1294,      44,    1269
     562,    1269,     348,    1295
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*ELEMENT, TYPE=STRI3, ELSET=outer_coil1
     673,    1329,      51,    1348
     674,    1348,     371,    1349
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*ELEMENT, TYPE=STRI3, ELSET=outer_coil2
     801,    1385,      60,    1404
     802,    1404,     387,    1405
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*ELEMENT, TYPE=STRI3, ELSET=outer_coil3
     929,    1441,      69,    1460
     930,    1460,     403,    1461
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*ELEMENT, TYPE=STRI3, ELSET=outer_coil4
    1057,    1497,      78,    1516
    1058,    1516,     419,    1517
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*ELEMENT, TYPE=STRI3, ELSET=outer_coil5
    1185,    1553,      87,    1572
    1186,    1572,     435,    1573
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*ELEMENT, TYPE=STRI3, ELSET=outer_coil6
    1313,    1609,      96,    1628
    1314,    1628,     451,    1629
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*ELEMENT, TYPE=STRI3, ELSET=ring
    1441,    2195,     116,    2196
    1442,    2196,     611,    2197
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*ELEMENT, TYPE=STRI3, ELSET=inner
    3169,    3514,     240,    3406
    3170,    3406,     902,    3515
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**
********************************** S I D E S E T S **********************************
*ELSET, ELSET=coil_E1
     674,     677,     692,     695,     706,     709
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*ELSET, ELSET=coil_E2
     673,     679,     690,     696,     705,     711
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*SURFACE, NAME=coil
coil_E1, E1
coil_E2, E2
*ELSET, ELSET=ring_E1
    1442,    1445,    1490,    1493,    1592,    1595
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*ELSET, ELSET=ring_E2
    1441,    1447,    1489,    1495,    1590,    1596
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*SURFACE, NAME=ring
ring_E1, E1
ring_E2, E2
**
********************************** P R O P E R T I E S ************************
*SHELL SECTION, ELSET=inner_coil1, SECTION INTEGRATION=SIMPSON, MATERIAL=Default-Steel
1.000000e+00
*SHELL SECTION, ELSET=inner_coil2, SECTION INTEGRATION=SIMPSON, MATERIAL=Default-Steel
1.000000e+00
*SHELL SECTION, ELSET=inner_coil3, SECTION INTEGRATION=SIMPSON, MATERIAL=Default-Steel
1.000000e+00
*SHELL SECTION, ELSET=inner_coil4, SECTION INTEGRATION=SIMPSON, MATERIAL=Default-Steel
1.000000e+00
*SHELL SECTION, ELSET=inner_coil5, SECTION INTEGRATION=SIMPSON, MATERIAL=Default-Steel
1.000000e+00
*SHELL SECTION, ELSET=inner_coil6, SECTION INTEGRATION=SIMPSON, MATERIAL=Default-Steel
1.000000e+00
*SHELL SECTION, ELSET=outer_coil1, SECTION INTEGRATION=SIMPSON, MATERIAL=Default-Steel
1.000000e+00
*SHELL SECTION, ELSET=outer_coil2, SECTION INTEGRATION=SIMPSON, MATERIAL=Default-Steel
1.000000e+00
*SHELL SECTION, ELSET=outer_coil3, SECTION INTEGRATION=SIMPSON, MATERIAL=Default-Steel
1.000000e+00
*SHELL SECTION, ELSET=outer_coil4, SECTION INTEGRATION=SIMPSON, MATERIAL=Default-Steel
1.000000e+00
*SHELL SECTION, ELSET=outer_coil5, SECTION INTEGRATION=SIMPSON, MATERIAL=Default-Steel
1.000000e+00
*SHELL SECTION, ELSET=outer_coil6, SECTION INTEGRATION=SIMPSON, MATERIAL=Default-Steel
1.000000e+00
*SHELL SECTION, ELSET=ring, SECTION INTEGRATION=SIMPSON, MATERIAL=Default-Steel
1.000000e+00
*SHELL SECTION, ELSET=inner, SECTION INTEGRATION=SIMPSON, MATERIAL=Default-Steel
1.000000e+00
**
*END PART
**
**
**
********************************** E N D   P A R T S **********************************
**
**
********************************** A S S E M B L Y ************************************
**
*ASSEMBLY, NAME=ASSEMBLY1
**
*INSTANCE, NAME=Part-Default_1, PART=Part-Default
*END INSTANCE
**
*END ASSEMBLY
**
**
**
*MATERIAL, NAME = Default-Steel
*ELASTIC, TYPE=ISOTROPIC
2.068000e+05, 2.900000e-01
*DENSITY
7.000000e-06
*CONDUCTIVITY,TYPE=ISO
4.500000e-02
*SPECIFIC HEAT
5.000000e+02
**
**
************************************** H I S T O R Y *************************************
**
*PREPRINT
**
**************************************** S T E P 1 ***************************************
*STEP,INC=100,NAME=Default Set
**
*STATIC
1, 1, 1e-05, 1
**
**
**
**
*END STEP
