*HEADING
cubit(sers/dudzinsm/Projects/oFEM/examples/eddyCurrent/coax.inp): 02/22/2017: 13
version: 16.0.3
**
********************************** P A R T S **********************************
*PART, NAME=Part-Default
**
********************************** N O D E S **********************************
*NODE, NSET=ALLNODES
       1,   -1.228669e-03,   -3.982914e-03
       2,   -1.083362e-03,   -3.850497e-03
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**
********************************** E L E M E N T S ****************************
*ELEMENT, TYPE=STRI3, ELSET=Aussenraum
       1,       1,       2,       3
       2,       4,       5,       6
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*ELEMENT, TYPE=STRI3, ELSET=Innenleiter
    2751,    1539,    1540,    1541
    2752,    1542,    1543,    1544
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*ELEMENT, TYPE=STRI3, ELSET=Aussenleiter
    2926,    1643,    1644,    1645
    2927,    1646,    1647,      20
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*ELEMENT, TYPE=STRI3, ELSET=Dielektrikum
    4675,    2494,    2495,    2496
    4676,    2497,    2498,    2499
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**
********************************** S I D E S E T S **********************************
*ELSET, ELSET=Umrandung_E1
       8,      11,      20,      24,      25,      28
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*ELSET, ELSET=Umrandung_E2
       3,      17,      29,      45,      53,      65
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*ELSET, ELSET=Umrandung_E3
       8,      19,      22,      23,      25,      45
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*SURFACE, NAME=Umrandung
Umrandung_E1, E1
Umrandung_E2, E2
Umrandung_E3, E3
*ELSET, ELSET=Innenrand_E1
    2755,    2759,    2774,    2796,    2806,    2818
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*ELSET, ELSET=Innenrand_E2
    2752,    2773,    2775,    2782,    2802,    2803
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*ELSET, ELSET=Innenrand_E3
    2762,    2763,    2764,    2767,    2771,    2778
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*SURFACE, NAME=Innenrand
Innenrand_E1, E1
Innenrand_E2, E2
Innenrand_E3, E3
*ELSET, ELSET=Zwischenrand_E1
    2929,    3039,    3043,    3054,    3089,    3113
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*ELSET, ELSET=Zwischenrand_E2
    2940,    2945,    2947,    2951,    2991,    3011
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*ELSET, ELSET=Zwischenrand_E3
    2939,    2965,    2972,    2989,    2990,    2995
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*SURFACE, NAME=Zwischenrand
Zwischenrand_E1, E1
Zwischenrand_E2, E2
Zwischenrand_E3, E3
*ELSET, ELSET=Aussenrand_E1
      16,      26,     209,     249,     264,     269
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*ELSET, ELSET=Aussenrand_E2
       1,       7,      15,      63,      67,      76
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*ELSET, ELSET=Aussenrand_E3
       9,      18,      43,      70,      99,     100
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*SURFACE, NAME=Aussenrand
Aussenrand_E1, E1
Aussenrand_E2, E2
Aussenrand_E3, E3
**
********************************** P R O P E R T I E S ************************
*SHELL SECTION, ELSET=Aussenraum, SECTION INTEGRATION=SIMPSON, MATERIAL=Default-Steel
1.000000e+00
*SHELL SECTION, ELSET=Innenleiter, SECTION INTEGRATION=SIMPSON, MATERIAL=Default-Steel
1.000000e+00
*SHELL SECTION, ELSET=Aussenleiter, SECTION INTEGRATION=SIMPSON, MATERIAL=Default-Steel
1.000000e+00
*SHELL SECTION, ELSET=Dielektrikum, SECTION INTEGRATION=SIMPSON, MATERIAL=Default-Steel
1.000000e+00
**
*END PART
**
**
**
********************************** E N D   P A R T S **********************************
**
**
********************************** A S S E M B L Y ************************************
**
*ASSEMBLY, NAME=ASSEMBLY1
**
*INSTANCE, NAME=Part-Default_1, PART=Part-Default
*END INSTANCE
**
*END ASSEMBLY
**
**
**
*MATERIAL, NAME = Default-Steel
*ELASTIC, TYPE=ISOTROPIC
2.068000e+05, 2.900000e-01
*DENSITY
7.000000e-06
*CONDUCTIVITY,TYPE=ISO
4.500000e-02
*SPECIFIC HEAT
5.000000e+02
**
**
************************************** H I S T O R Y *************************************
**
*PREPRINT
**
**************************************** S T E P 1 ***************************************
*STEP,INC=100,NAME=Default Set
**
*STATIC
1, 1, 1e-05, 1
**
**
**
**
*END STEP
