*HEADING
cubit(ments/HSU/oFEM/examples/heatEquation/room_with_heater.inp): 10/27/2017: 08
version: 16.1.3
**
********************************** P A R T S **********************************
*PART, NAME=Part-Default
**
********************************** N O D E S **********************************
*NODE, NSET=ALLNODES
       1,   -5.000000e-01,    5.000000e-01,    5.000000e-01
       2,   -5.000000e-01,    5.000000e-01,   -5.000000e-01
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**
********************************** E L E M E N T S ****************************
*ELEMENT, TYPE=C3D4, ELSET=Space
       1,     180,     181,     182,     183
       2,     184,     185,     186,     183
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**
********************************** S I D E S E T S **********************************
*ELSET, ELSET=Window_S1
     459,     552,     971,    1148,    1155,    1175,    1376,    1377
*SURFACE, NAME=Window
Window_S1, S1
*ELSET, ELSET=Wall_S1
       8,      19,      25,      41,      78,     112
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*ELSET, ELSET=Wall_S2
     225,     262,     340,     380,     585,     786
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*ELSET, ELSET=Wall_S4
      41,     228,     454,     553,    1162,    1190
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*SURFACE, NAME=Wall
Wall_S1, S1
Wall_S2, S2
Wall_S4, S4
*ELSET, ELSET=Heater_S1
     308,     670,     693,     817,     899,    1073,    1097,    1100,    1256,    1271,
    1425,    1438,    1454,    1465,    1469,    1480
*ELSET, ELSET=Heater_S3
     161,    1185,    1239,    1474
*SURFACE, NAME=Heater
Heater_S1, S1
Heater_S3, S3
**
********************************** P R O P E R T I E S ************************
*SOLID SECTION, ELSET=Space, MATERIAL=Default-Steel
**
*END PART
**
**
**
********************************** E N D   P A R T S **********************************
**
**
********************************** A S S E M B L Y ************************************
**
*ASSEMBLY, NAME=ASSEMBLY1
**
*INSTANCE, NAME=Part-Default_1, PART=Part-Default
*END INSTANCE
**
*END ASSEMBLY
**
**
**
*MATERIAL, NAME = Default-Steel
*ELASTIC, TYPE=ISOTROPIC
2.068000e+05, 2.900000e-01
*DENSITY
7.000000e-06
*CONDUCTIVITY,TYPE=ISO
4.500000e-02
*SPECIFIC HEAT
5.000000e+02
**
**
************************************** H I S T O R Y *************************************
**
*PREPRINT
**
**************************************** S T E P 1 ***************************************
*STEP,INC=100,NAME=Default Set
**
*STATIC
1, 1, 1e-05, 1
**
**
**
**
*END STEP
