*HEADING
cubit(ojects/oFEM/trunk/test_env/exer/linearElasticity/pipe.inp): 08/25/2015: 12
version: 15.1.4
**
********************************** P A R T S **********************************
*PART, NAME=Part-Default
**
********************************** N O D E S **********************************
*NODE, NSET=ALLNODES
       1,   -2.640887e+01,    1.439151e+02,    1.742328e+02
       2,   -3.325966e+01,    1.470000e+02,    1.737766e+02
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**
********************************** E L E M E N T S ****************************
*ELEMENT, TYPE=C3D4, ELSET=pipe
       1,       1,       2,       3,       4
       2,       5,       6,       7,       8
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**
********************************** S I D E S E T S **********************************
*ELSET, ELSET=fixed_part_S1
      96,    1523,    1824,    5464,    6373,    7135
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*ELSET, ELSET=fixed_part_S2
     313,     355,    1560,    1720,    5069,    5388
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*ELSET, ELSET=fixed_part_S3
      47,     105,     108,     195,     203,     394
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*ELSET, ELSET=fixed_part_S4
     248,     269,     319,     322,     988,    1193
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*SURFACE, NAME=fixed_part
fixed_part_S1, S1
fixed_part_S2, S2
fixed_part_S3, S3
fixed_part_S4, S4
*ELSET, ELSET=push_part_S1
      61,      66,     277,     349,     903,     940
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*ELSET, ELSET=push_part_S2
     177,     303,     729,    1380,    1491,    5250
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*ELSET, ELSET=push_part_S3
      52,     114,     292,     318,     418,     477
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*ELSET, ELSET=push_part_S4
     508,     578,     734,    5427,    5536,    5981,    6633,    6795,    6858,    7827,
    7830,    9479,    9518,    9693,    9793
*SURFACE, NAME=push_part
push_part_S1, S1
push_part_S2, S2
push_part_S3, S3
push_part_S4, S4
**
********************************** P R O P E R T I E S ************************
*SOLID SECTION, ELSET=pipe, MATERIAL=Default-Steel
**
*END PART
**
**
**
********************************** E N D   P A R T S **********************************
**
**
********************************** A S S E M B L Y ************************************
**
*ASSEMBLY, NAME=ASSEMBLY1
**
*INSTANCE, NAME=Part-Default_1, PART=Part-Default
*END INSTANCE
**
*END ASSEMBLY
**
**
**
**
************************************** H I S T O R Y *************************************
**
*PREPRINT
**
**************************************** S T E P 1 ***************************************
*STEP,INC=100,NAME=Default Set
**
*STATIC
1, 1, 1e-05, 1
**
**
**
**
*END STEP
