*HEADING
cubit(itHub//oFEM/examples/planarCapacitor/planar_capacitor.inp): 04/17/2018: 16
version: 16.3.4
**
********************************** P A R T S **********************************
*PART, NAME=Part-Default
**
********************************** N O D E S **********************************
*NODE, NSET=ALLNODES
       1,    0.000000e+00,    1.000000e-01
       2,   -1.000000e-01,    1.000000e-01
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**
********************************** E L E M E N T S ****************************
*ELEMENT, TYPE=STRI3, ELSET=kondensator_li
     689,     863,      13,     823
     690,     823,     456,     880
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*ELEMENT, TYPE=STRI3, ELSET=kondensator_re
     913,     947,      18,     932
     914,     932,     486,     972
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*ELEMENT, TYPE=STRI3, ELSET=Aussenraum
    1137,    1796,    1797,    1798
    1138,    1799,     410,    1249
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**
********************************** S I D E S E T S **********************************
*ELSET, ELSET=linke_Platte_E1
     745,     754,     810,     813,     826,     829,     842,     845,    1962,    1965,
    1978,    1981,    1994,    1997,    2010,    2013
*ELSET, ELSET=linke_Platte_E2
     747,     753,     809,     815,     825,     831,     841,     847,    1961,    1967,
    1977,    1983,    1993,    1999,    2009,    2015
*SURFACE, NAME=linke_Platte
linke_Platte_E1, E1
linke_Platte_E2, E2
*ELSET, ELSET=rechte_Platte_E1
    1049,    1058,    1070,    1073,    1102,    1105,    1118,    1121,    1930,    1933,
    2058,    2061,    2074,    2077,    2090,    2093
*ELSET, ELSET=rechte_Platte_E2
    1051,    1057,    1069,    1075,    1101,    1107,    1117,    1123,    1929,    1935,
    2057,    2063,    2073,    2079,    2089,    2095
*SURFACE, NAME=rechte_Platte
rechte_Platte_E1, E1
rechte_Platte_E2, E2
**
********************************** P R O P E R T I E S ************************
*SHELL SECTION, ELSET=kondensator_li, SECTION INTEGRATION=SIMPSON, MATERIAL=Default-Steel
1.000000e+00
*SHELL SECTION, ELSET=kondensator_re, SECTION INTEGRATION=SIMPSON, MATERIAL=Default-Steel
1.000000e+00
*SHELL SECTION, ELSET=Aussenraum, SECTION INTEGRATION=SIMPSON, MATERIAL=Default-Steel
1.000000e+00
**
*END PART
**
**
**
********************************** E N D   P A R T S **********************************
**
**
********************************** A S S E M B L Y ************************************
**
*ASSEMBLY, NAME=ASSEMBLY1
**
*INSTANCE, NAME=Part-Default_1, PART=Part-Default
*END INSTANCE
**
*END ASSEMBLY
**
**
**
*MATERIAL, NAME = Default-Steel
*ELASTIC, TYPE=ISOTROPIC
2.068000e+05, 2.900000e-01
*DENSITY
7.000000e-06
*CONDUCTIVITY,TYPE=ISO
4.500000e-02
*SPECIFIC HEAT
5.000000e+02
**
**
************************************** H I S T O R Y *************************************
**
*PREPRINT
**
**************************************** S T E P 1 ***************************************
*STEP,INC=100,NAME=Default Set
**
*STATIC
1, 1, 1e-05, 1
**
**
**
**
*END STEP
