*HEADING
cubit(/HSU/Lehre/master-wall/simmulation/ma-arbeit/myplate2.inp): 06/15/2015: 15
version: 15.0.2
**
********************************** P A R T S **********************************
*PART, NAME=Part-Default
**
********************************** N O D E S **********************************
*NODE, NSET=ALLNODES
       1,   -1.500000e+00,    1.500000e+00
       2,    1.500000e+00,    1.500000e+00
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**
********************************** E L E M E N T S ****************************
*ELEMENT, TYPE=STRI3, ELSET=EB1
   16865,    7115,     444,    4830
   16866,    4830,    1387,    7116
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**
********************************** N O D E S E T S **********************************
*NSET, NSET=Diri
      49,      50,      51,      52,      72,      73
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**
********************************** S I D E S E T S **********************************
*ELSET, ELSET=Diri_E1
    5334,    5337,    5702,    5705,    6502,    6518
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*ELSET, ELSET=Diri_E2
    5333,    5339,    5701,    5707,    6501,    6517
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*SURFACE, NAME=Diri
Diri_E1, E1
Diri_E2, E2
*ELSET, ELSET=Diri2_E1
    5334,    5337,    5702,    5705,    6502,    6518
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*ELSET, ELSET=Diri2_E2
    5333,    5339,    5701,    5707,    6501,    6517
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*SURFACE, NAME=Diri2
Diri2_E1, E1
Diri2_E2, E2
**
********************************** P R O P E R T I E S ************************
*SHELL SECTION, ELSET=EB1, SECTION INTEGRATION=SIMPSON, MATERIAL=Default-Steel
1.000000e+00
**
*END PART
**
**
**
********************************** E N D   P A R T S **********************************
**
**
********************************** A S S E M B L Y ************************************
**
*ASSEMBLY, NAME=ASSEMBLY1
**
*INSTANCE, NAME=Part-Default_1, PART=Part-Default
*END INSTANCE
**
*END ASSEMBLY
**
**
**
**
************************************** H I S T O R Y *************************************
**
*PREPRINT
**
**************************************** S T E P 1 ***************************************
*STEP,INC=100,NAME=Default Set
**
*STATIC
1, 1, 1e-05, 1
**
**
**
**
*END STEP
