*HEADING
cubit(n/ownCloud/ofem/workshop/exer4-oFEM/spaceChargeSphere.inp): 07/07/2015: 13
version: 15.1.4
**
********************************** P A R T S **********************************
*PART, NAME=Part-Default
**
********************************** N O D E S **********************************
*NODE, NSET=ALLNODES
       1,   -3.650934e+00,    3.079274e+00,    2.159920e-01
       2,   -4.867204e+00,    1.613125e+00,    9.376626e-01
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**
********************************** E L E M E N T S ****************************
*ELEMENT, TYPE=C3D4, ELSET=Sphere
       1,       1,       2,       3,       4
       2,       5,       3,       6,       7
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*ELEMENT, TYPE=C3D4, ELSET=Space
    2776,     593,     594,     595,     596
    2777,     597,     598,     596,     599
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**
********************************** S I D E S E T S **********************************
*ELSET, ELSET=ground_S1
     498,     616,    2180,    2457
*ELSET, ELSET=ground_S2
    1394,    1999,    2142,    2323,    2392,    2399,    2438,    2477
*ELSET, ELSET=ground_S3
      51,     183,     184,     208,     209,     227
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*ELSET, ELSET=ground_S4
     762,     895,    1381,    1506,    1650,    1666,    1677,    1792,    1889,    2036,
    2340,    2379,    2507,    2749
*SURFACE, NAME=ground
ground_S1, S1
ground_S2, S2
ground_S3, S3
ground_S4, S4
**
********************************** P R O P E R T I E S ************************
*SOLID SECTION, ELSET=Sphere, MATERIAL=Default-Steel
*SOLID SECTION, ELSET=Space, MATERIAL=Default-Steel
**
*END PART
**
**
**
********************************** E N D   P A R T S **********************************
**
**
********************************** A S S E M B L Y ************************************
**
*ASSEMBLY, NAME=ASSEMBLY1
**
*INSTANCE, NAME=Part-Default_1, PART=Part-Default
*END INSTANCE
**
*END ASSEMBLY
**
**
**
**
************************************** H I S T O R Y *************************************
**
*PREPRINT
**
**************************************** S T E P 1 ***************************************
*STEP,INC=100,NAME=Default Set
**
*STATIC
1, 1, 1e-05, 1
**
**
**
**
*END STEP
